*Heading
 OpenJaw crown biofilm T23  beta=0.50
** Job name: OJ_Crown_T23_b050 Model name: OpenJawAssembly
** Generated by: Abaqus/CAE 2024
*Preprint, echo=NO, model=NO, history=NO, contact=NO
**
** PARTS
**
*Part, name=CrownBiofilm
*Node
      1,  -70.6643829,  -38.0521278,           0.
      2,  -71.2665634,  -39.4400139,           0.
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*Element, type=C3D8R
   1,   131,    30,    29,   130,   321,   220,   219,   320
   2,   124,    33,     3,   123,   314,   223,   193,   313
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*Elset, elset=_PickedSet4, internal
   14,   25,   37,   41,   43,   83
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*Elset, elset=_PickedSet5, internal
  113,  115,  237,  239,  361,  363
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*Elset, elset=_PickedSet6, internal
    7,   24,   38,   78,   81,   82
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*Elset, elset=_PickedSet7, internal
    1,    2,    3,    4,    6,    9
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*Elset, elset=_PickedSet8, internal
   39,   56,   84,  163,  180,  208
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*Elset, elset=_PickedSet9, internal
    8,   85,   90,   99,  108,  132
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*Elset, elset=_PickedSet10, internal
    5,   74,  103,  129,  198,  227
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*Orientation, name=Ori-1
          1.,           0.,           0.,           0.,           1.,           0.
1, 0.
** Section: SEC_ANISO_08
*Solid Section, elset=_PickedSet7, orientation=Ori-1, material=MAT_ANISO_08
,
** Section: SEC_ANISO_11
*Solid Section, elset=_PickedSet10, orientation=Ori-1, material=MAT_ANISO_11
,
** Section: SEC_ANISO_07
*Solid Section, elset=_PickedSet6, orientation=Ori-1, material=MAT_ANISO_07
,
** Section: SEC_ANISO_10
*Solid Section, elset=_PickedSet9, orientation=Ori-1, material=MAT_ANISO_10
,
** Section: SEC_ANISO_04
*Solid Section, elset=_PickedSet4, orientation=Ori-1, material=MAT_ANISO_04
,
** Section: SEC_ANISO_09
*Solid Section, elset=_PickedSet8, orientation=Ori-1, material=MAT_ANISO_09
,
** Section: SEC_ANISO_05
*Solid Section, elset=_PickedSet5, orientation=Ori-1, material=MAT_ANISO_05
,
*End Part
**
**
** ASSEMBLY
**
*Assembly, name=Assembly
**
*Instance, name=CrownBioInst, part=CrownBiofilm
          0.,           0., 18.5561180114746
*End Instance
**
*Nset, nset=_PickedSet4, internal, instance=CrownBioInst, generate
   1,  190,    1
*Elset, elset=_PickedSet4, internal, instance=CrownBioInst, generate
   1,  124,    1
*Elset, elset=__PickedSurf5_S2, internal, instance=CrownBioInst, generate
 7937,  8060,     1
*Surface, type=ELEMENT, name=_PickedSurf5, internal
__PickedSurf5_S2, S2
*End Assembly
**
** MATERIALS
**
*Material, name=MAT_ANISO_00
*Elastic, type=ENGINEERING CONSTANTS
 9.66586e+09, 4.83293e+09, 4.83293e+09,         0.3,         0.3,         0.3, 3.71764e+09, 3.71764e+09
 1.85882e+09,
*Material, name=MAT_ANISO_01
*Elastic, type=ENGINEERING CONSTANTS
 9.01552e+09, 4.50776e+09, 4.50776e+09,         0.3,         0.3,         0.3, 3.46751e+09, 3.46751e+09
 1.73375e+09,
*Material, name=MAT_ANISO_02
*Elastic, type=ENGINEERING CONSTANTS
 8.38908e+09, 4.19454e+09, 4.19454e+09,         0.3,         0.3,         0.3, 3.22657e+09, 3.22657e+09
 1.61329e+09,
*Material, name=MAT_ANISO_03
*Elastic, type=ENGINEERING CONSTANTS
 7.78656e+09, 3.89328e+09, 3.89328e+09,         0.3,         0.3,         0.3, 2.99483e+09, 2.99483e+09
 1.49742e+09,
*Material, name=MAT_ANISO_04
*Elastic, type=ENGINEERING CONSTANTS
 7.20795e+09, 3.60398e+09, 3.60398e+09,         0.3,         0.3,         0.3, 2.77229e+09, 2.77229e+09
 1.38614e+09,
*Material, name=MAT_ANISO_05
*Elastic, type=ENGINEERING CONSTANTS
 6.65326e+09, 3.32663e+09, 3.32663e+09,         0.3,         0.3,         0.3, 2.55894e+09, 2.55894e+09
 1.27947e+09,
*Material, name=MAT_ANISO_06
*Elastic, type=ENGINEERING CONSTANTS
 6.12247e+09, 3.06123e+09, 3.06123e+09,         0.3,         0.3,         0.3,  2.3548e+09,  2.3548e+09
  1.1774e+09,
*Material, name=MAT_ANISO_07
*Elastic, type=ENGINEERING CONSTANTS
 5.6156e+09,  2.8078e+09,  2.8078e+09,         0.3,         0.3,         0.3, 2.15984e+09, 2.15984e+09
 1.07992e+09,
*Material, name=MAT_ANISO_08
*Elastic, type=ENGINEERING CONSTANTS
 5.13263e+09, 2.56632e+09, 2.56632e+09,         0.3,         0.3,         0.3, 1.97409e+09, 1.97409e+09
 9.87045e+08,
*Material, name=MAT_ANISO_09
*Elastic, type=ENGINEERING CONSTANTS
 4.67358e+09, 2.33679e+09, 2.33679e+09,         0.3,         0.3,         0.3, 1.79753e+09, 1.79753e+09
 8.98766e+08,
*Material, name=MAT_ANISO_10
*Elastic, type=ENGINEERING CONSTANTS
 4.23844e+09, 2.11922e+09, 2.11922e+09,         0.3,         0.3,         0.3, 1.63017e+09, 1.63017e+09
 8.15085e+08,
*Material, name=MAT_ANISO_11
*Elastic, type=ENGINEERING CONSTANTS
 3.82722e+09, 1.91361e+09, 1.91361e+09,         0.3,         0.3,         0.3, 1.47201e+09, 1.47201e+09
 7.36003e+08,
*Material, name=MAT_ANISO_12
*Elastic, type=ENGINEERING CONSTANTS
 3.4399e+09, 1.71995e+09, 1.71995e+09,         0.3,         0.3,         0.3, 1.32304e+09, 1.32304e+09
 6.61519e+08,
*Material, name=MAT_ANISO_13
*Elastic, type=ENGINEERING CONSTANTS
 3.0765e+09, 1.53825e+09, 1.53825e+09,         0.3,         0.3,         0.3, 1.18327e+09, 1.18327e+09
 5.91634e+08,
*Material, name=MAT_ANISO_14
*Elastic, type=ENGINEERING CONSTANTS
 2.737e+09,  1.3685e+09,  1.3685e+09,         0.3,         0.3,         0.3, 1.05269e+09, 1.05269e+09
 5.26347e+08,
*Material, name=MAT_ANISO_15
*Elastic, type=ENGINEERING CONSTANTS
 2.42142e+09, 1.21071e+09, 1.21071e+09,         0.3,         0.3,         0.3, 9.31316e+08, 9.31316e+08
 4.65658e+08,
*Material, name=MAT_ANISO_16
*Elastic, type=ENGINEERING CONSTANTS
 2.12975e+09, 1.06488e+09, 1.06488e+09,         0.3,         0.3,         0.3, 8.19136e+08, 8.19136e+08
 4.09568e+08,
*Material, name=MAT_ANISO_17
*Elastic, type=ENGINEERING CONSTANTS
 1.862e+09, 9.30998e+08, 9.30998e+08,         0.3,         0.3,         0.3, 7.16153e+08, 7.16153e+08
 3.58076e+08,
*Material, name=MAT_ANISO_18
*Elastic, type=ENGINEERING CONSTANTS
 1.61815e+09, 8.09076e+08, 8.09076e+08,         0.3,         0.3,         0.3, 6.22366e+08, 6.22366e+08
 3.11183e+08,
*Material, name=MAT_ANISO_19
*Elastic, type=ENGINEERING CONSTANTS
 1.39822e+09, 6.99109e+08, 6.99109e+08,         0.3,         0.3,         0.3, 5.37776e+08, 5.37776e+08
 2.68888e+08,
*Material, name=MAT_TOOTH
*Elastic
 1e+10, 0.3
**
** BOUNDARY CONDITIONS
**
** Name: FIX_CROWN_BOT Type: Displacement/Rotation
*Boundary
_PickedSet4, 1, 1
_PickedSet4, 2, 2
_PickedSet4, 3, 3
** ----------------------------------------------------------------
**
** STEP: LOAD_CROWN
**
*Step, name=LOAD_CROWN, nlgeom=NO
*Static
0.1, 1., 1e-05, 1.
**
** LOADS
**
** Name: PRESS_CROWN   Type: Pressure
*Dsload
_PickedSurf5, P, 1e+06
**
** OUTPUT REQUESTS
**
*Restart, write, frequency=0
**
** FIELD OUTPUT: F-Output-1
**
*Output, field, variable=PRESELECT
**
** HISTORY OUTPUT: H-Output-1
**
*Output, history, variable=PRESELECT
*End Step
