*Heading
 Aniso biofilm  beta=0.50  e1=[1.00,0.00,0.00]
** Job name: dh_cube_test Model name: BiofilmAniso3D
** Generated by: Abaqus/CAE 2024
*Preprint, echo=NO, model=NO, history=NO, contact=NO
**
** PARTS
**
*Part, name=Biofilm
*Node
      1,           1.,           1.,           1.
      2,           1.,  0.928571403,           1.
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*Element, type=C3D8R
   1,  226,  227,  242,  241,    1,    2,   17,   16
   2,  227,  228,  243,  242,    2,    3,   18,   17
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*Elset, elset=_PickedSet4, internal
  555, 1402
*Elset, elset=_PickedSet5, internal
  139,  205,  372,  373,  524,  712,  908, 1076, 1266, 1353, 1408, 1800, 1931, 1958, 2162
*Elset, elset=_PickedSet6, internal
    9,   24,   45,   49,   59,   63
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*Elset, elset=_PickedSet7, internal
    1,   16,   18,   19,   20,   22
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*Elset, elset=_PickedSet8, internal
    2,   10,   17,   21,   28,   31
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*Elset, elset=_PickedSet9, internal
    3,    6,   15,   37,   42,   50
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*Elset, elset=_PickedSet10, internal
   11,   14,   26,   27,   32,   33
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*Elset, elset=_PickedSet11, internal
    4,    5,   12,   38,   41,   43
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*Elset, elset=_PickedSet12, internal
    7,    8,   13,   34,   36,   46
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*Elset, elset=_PickedSet13, internal
   25,   39,   40,   90,   95,  110
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*Elset, elset=_PickedSet14, internal
   48,   62,  178,  193,  231,  295
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*Elset, elset=_PickedSet15, internal
   56,   70,  123,  141,  143,  157
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*Elset, elset=_PickedSet16, internal
   82,   99,  174,  225,  305,  332
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*Elset, elset=_PickedSet17, internal
   52,   66,  377,  471, 1002, 1547
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*Elset, elset=_PickedSet18, internal
  351,  417,  598,  794,  994, 1215
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*Elset, elset=_PickedSet19, internal
 1693, 2471, 2558
*Elset, elset=_PickedSet20, internal
  681,  877, 2569, 2714
*Elset, elset=_PickedSet21, internal
 2347, 2624, 2646
*Elset, elset=_PickedSet22, internal
 2257,
*Orientation, name=Ori-1
          1.,           0.,           0.,           0.,           0.,           1.
1, 0.
** Section: SEC_ANISO_04
*Solid Section, elset=_PickedSet7, orientation=Ori-1, material=MAT_ANISO_04
,
** Section: SEC_ANISO_05
*Solid Section, elset=_PickedSet8, orientation=Ori-1, material=MAT_ANISO_05
,
** Section: SEC_ANISO_06
*Solid Section, elset=_PickedSet9, orientation=Ori-1, material=MAT_ANISO_06
,
** Section: SEC_ANISO_08
*Solid Section, elset=_PickedSet11, orientation=Ori-1, material=MAT_ANISO_08
,
** Section: SEC_ANISO_09
*Solid Section, elset=_PickedSet12, orientation=Ori-1, material=MAT_ANISO_09
,
** Section: SEC_ANISO_03
*Solid Section, elset=_PickedSet6, orientation=Ori-1, material=MAT_ANISO_03
,
** Section: SEC_ANISO_07
*Solid Section, elset=_PickedSet10, orientation=Ori-1, material=MAT_ANISO_07
,
** Section: SEC_ANISO_10
*Solid Section, elset=_PickedSet13, orientation=Ori-1, material=MAT_ANISO_10
,
** Section: SEC_ANISO_11
*Solid Section, elset=_PickedSet14, orientation=Ori-1, material=MAT_ANISO_11
,
** Section: SEC_ANISO_14
*Solid Section, elset=_PickedSet17, orientation=Ori-1, material=MAT_ANISO_14
,
** Section: SEC_ANISO_12
*Solid Section, elset=_PickedSet15, orientation=Ori-1, material=MAT_ANISO_12
,
** Section: SEC_ANISO_13
*Solid Section, elset=_PickedSet16, orientation=Ori-1, material=MAT_ANISO_13
,
** Section: SEC_ANISO_02
*Solid Section, elset=_PickedSet5, orientation=Ori-1, material=MAT_ANISO_02
,
** Section: SEC_ANISO_15
*Solid Section, elset=_PickedSet18, orientation=Ori-1, material=MAT_ANISO_15
,
** Section: SEC_ANISO_01
*Solid Section, elset=_PickedSet4, orientation=Ori-1, material=MAT_ANISO_01
,
** Section: SEC_ANISO_17
*Solid Section, elset=_PickedSet20, orientation=Ori-1, material=MAT_ANISO_17
,
** Section: SEC_ANISO_16
*Solid Section, elset=_PickedSet19, orientation=Ori-1, material=MAT_ANISO_16
,
** Section: SEC_ANISO_19
*Solid Section, elset=_PickedSet22, orientation=Ori-1, material=MAT_ANISO_19
,
** Section: SEC_ANISO_18
*Solid Section, elset=_PickedSet21, orientation=Ori-1, material=MAT_ANISO_18
,
*End Part
**
**
** ASSEMBLY
**
*Assembly, name=Assembly
**
*Instance, name=BioInst, part=Biofilm
*End Instance
**
*Nset, nset=_PickedSet3, internal, instance=BioInst
  211,  212,  213,  214,  215,  216
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*Elset, elset=_PickedSet3, internal, instance=BioInst
  183,  184,  185,  186,  187,  188
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*Elset, elset=__PickedSurf4_S3, internal, instance=BioInst
    1,    2,    3,    4,    5,    6
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*Surface, type=ELEMENT, name=_PickedSurf4, internal
__PickedSurf4_S3, S3
*End Assembly
**
** MATERIALS
**
*Material, name=MAT_ANISO_00
*Elastic, type=ENGINEERING CONSTANTS
 9.60162e+09, 4.80081e+09, 4.80081e+09,         0.3,         0.3,         0.3, 3.69293e+09, 3.69293e+09
 1.84647e+09,
*Material, name=MAT_ANISO_01
*Elastic, type=ENGINEERING CONSTANTS
 8.83045e+09, 4.41523e+09, 4.41523e+09,         0.3,         0.3,         0.3, 3.39633e+09, 3.39633e+09
 1.69816e+09,
*Material, name=MAT_ANISO_02
*Elastic, type=ENGINEERING CONSTANTS
 8.09339e+09, 4.04669e+09, 4.04669e+09,         0.3,         0.3,         0.3, 3.11284e+09, 3.11284e+09
 1.55642e+09,
*Material, name=MAT_ANISO_03
*Elastic, type=ENGINEERING CONSTANTS
 7.39043e+09, 3.69521e+09, 3.69521e+09,         0.3,         0.3,         0.3, 2.84247e+09, 2.84247e+09
 1.42124e+09,
*Material, name=MAT_ANISO_04
*Elastic, type=ENGINEERING CONSTANTS
 6.72158e+09, 3.36079e+09, 3.36079e+09,         0.3,         0.3,         0.3, 2.58522e+09, 2.58522e+09
 1.29261e+09,
*Material, name=MAT_ANISO_05
*Elastic, type=ENGINEERING CONSTANTS
 6.08684e+09, 3.04342e+09, 3.04342e+09,         0.3,         0.3,         0.3, 2.34109e+09, 2.34109e+09
 1.17055e+09,
*Material, name=MAT_ANISO_06
*Elastic, type=ENGINEERING CONSTANTS
 5.48621e+09,  2.7431e+09,  2.7431e+09,         0.3,         0.3,         0.3, 2.11008e+09, 2.11008e+09
 1.05504e+09,
*Material, name=MAT_ANISO_07
*Elastic, type=ENGINEERING CONSTANTS
 4.91968e+09, 2.45984e+09, 2.45984e+09,         0.3,         0.3,         0.3, 1.89218e+09, 1.89218e+09
 9.46092e+08,
*Material, name=MAT_ANISO_08
*Elastic, type=ENGINEERING CONSTANTS
 4.38726e+09, 2.19363e+09, 2.19363e+09,         0.3,         0.3,         0.3, 1.68741e+09, 1.68741e+09
 8.43704e+08,
*Material, name=MAT_ANISO_09
*Elastic, type=ENGINEERING CONSTANTS
 3.88895e+09, 1.94448e+09, 1.94448e+09,         0.3,         0.3,         0.3, 1.49575e+09, 1.49575e+09
 7.47876e+08,
*Material, name=MAT_ANISO_10
*Elastic, type=ENGINEERING CONSTANTS
 3.42475e+09, 1.71238e+09, 1.71238e+09,         0.3,         0.3,         0.3, 1.31721e+09, 1.31721e+09
 6.58606e+08,
*Material, name=MAT_ANISO_11
*Elastic, type=ENGINEERING CONSTANTS
 2.99466e+09, 1.49733e+09, 1.49733e+09,         0.3,         0.3,         0.3, 1.15179e+09, 1.15179e+09
 5.75896e+08,
*Material, name=MAT_ANISO_12
*Elastic, type=ENGINEERING CONSTANTS
 2.59867e+09, 1.29934e+09, 1.29934e+09,         0.3,         0.3,         0.3,  9.9949e+08,  9.9949e+08
 4.99745e+08,
*Material, name=MAT_ANISO_13
*Elastic, type=ENGINEERING CONSTANTS
 2.2368e+09,  1.1184e+09,  1.1184e+09,         0.3,         0.3,         0.3, 8.60306e+08, 8.60306e+08
 4.30153e+08,
*Material, name=MAT_ANISO_14
*Elastic, type=ENGINEERING CONSTANTS
 1.90903e+09, 9.54513e+08, 9.54513e+08,         0.3,         0.3,         0.3, 7.34241e+08, 7.34241e+08
  3.6712e+08,
*Material, name=MAT_ANISO_15
*Elastic, type=ENGINEERING CONSTANTS
 1.61536e+09, 8.07682e+08, 8.07682e+08,         0.3,         0.3,         0.3, 6.21294e+08, 6.21294e+08
 3.10647e+08,
*Material, name=MAT_ANISO_16
*Elastic, type=ENGINEERING CONSTANTS
 1.35581e+09, 6.77905e+08, 6.77905e+08,         0.3,         0.3,         0.3, 5.21466e+08, 5.21466e+08
 2.60733e+08,
*Material, name=MAT_ANISO_17
*Elastic, type=ENGINEERING CONSTANTS
 1.13036e+09, 5.65182e+08, 5.65182e+08,         0.3,         0.3,         0.3, 4.34756e+08, 4.34756e+08
 2.17378e+08,
*Material, name=MAT_ANISO_18
*Elastic, type=ENGINEERING CONSTANTS
 9.39027e+08, 4.69513e+08, 4.69513e+08,         0.3,         0.3,         0.3, 3.61164e+08, 3.61164e+08
 1.80582e+08,
*Material, name=MAT_ANISO_19
*Elastic, type=ENGINEERING CONSTANTS
 7.81797e+08, 3.90898e+08, 3.90898e+08,         0.3,         0.3,         0.3, 3.00691e+08, 3.00691e+08
 1.50345e+08,
**
** BOUNDARY CONDITIONS
**
** Name: FIX_BOT Type: Displacement/Rotation
*Boundary
_PickedSet3, 1, 1
_PickedSet3, 2, 2
_PickedSet3, 3, 3
** ----------------------------------------------------------------
**
** STEP: LOAD
**
*Step, name=LOAD, nlgeom=NO
*Static
0.1, 1., 1e-05, 1.
**
** LOADS
**
** Name: PRESS   Type: Pressure
*Dsload
_PickedSurf4, P, 1e+06
**
** OUTPUT REQUESTS
**
*Restart, write, frequency=0
**
** FIELD OUTPUT: F-Output-1
**
*Output, field, variable=PRESELECT
**
** HISTORY OUTPUT: H-Output-1
**
*Output, history, variable=PRESELECT
*End Step
