** biofilm_conformal_tet.py – Conformal C3D4 biofilm mesh
** STL   : P1_Tooth_23.stl
** DI CSV: abaqus_field_dh_3d.csv
** Thickness: 0.500 mm  Layers: 8  Total nodes: 16173  Total tets: 86160
** Inner face: tooth STL surface (zero penetration by construction)
**
*Heading
 Conformal biofilm tet mesh - P1_Tooth_23.stl
**
*Node
 1, -69.657928, -45.383583, 26.145887
 2, -69.328705, -45.38681, 25.758587
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**
*Element, type=C3D4
 1, 1, 2, 3, 1800
 2, 1, 2, 1800, 1799
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**
*Nset, nset=INNER_FACE
1, 2, 3, 4, 5, 6
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**
*Nset, nset=OUTER_FACE
14377, 14378, 14379, 14380, 14381, 14382
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**
*Nset, nset=BOT_NODES
114, 115, 116, 160, 306, 307
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**
*Nset, nset=TOP_NODES
111, 112, 113, 149, 150, 151
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**
*Nset, nset=ALL_NODES, generate
 1, 16173, 1
**
*Elset, elset=BIN_03
64621, 64622, 64623, 64624, 64625, 64626
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**
*Elset, elset=BIN_04
10771, 10772, 10773, 10774, 10775, 10776
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**
*Elset, elset=BIN_06
32311, 32312, 32313, 32314, 32315, 32316
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**
*Elset, elset=BIN_07
43081, 43082, 43083, 43084, 43085, 43086
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**
*Elset, elset=BIN_08
21541, 21542, 21543, 21544, 21545, 21546
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**
*Elset, elset=BIN_10
75391, 75392, 75393, 75394, 75395, 75396
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**
*Elset, elset=BIN_11
1, 2, 3, 4, 5, 6
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**
*Elset, elset=ALL_ELEMS, generate
 1, 86160, 1
**
** =====  MATERIALS (transverse isotropy per DI bin)  =====
*Material, name=MAT_ANISO_00
*Elastic, type=ENGINEERING CONSTANTS
 9.66586e+09, 4.83293e+09, 4.83293e+09, 0.3000, 0.3000, 0.3000, 3.71764e+09, 3.71764e+09, 1.85882e+09
**
*Material, name=MAT_ANISO_01
*Elastic, type=ENGINEERING CONSTANTS
 9.01552e+09, 4.50776e+09, 4.50776e+09, 0.3000, 0.3000, 0.3000, 3.46751e+09, 3.46751e+09, 1.73375e+09
**
*Material, name=MAT_ANISO_02
*Elastic, type=ENGINEERING CONSTANTS
 8.38908e+09, 4.19454e+09, 4.19454e+09, 0.3000, 0.3000, 0.3000, 3.22657e+09, 3.22657e+09, 1.61329e+09
**
*Material, name=MAT_ANISO_03
*Elastic, type=ENGINEERING CONSTANTS
 7.78656e+09, 3.89328e+09, 3.89328e+09, 0.3000, 0.3000, 0.3000, 2.99483e+09, 2.99483e+09, 1.49742e+09
**
*Material, name=MAT_ANISO_04
*Elastic, type=ENGINEERING CONSTANTS
 7.20795e+09, 3.60398e+09, 3.60398e+09, 0.3000, 0.3000, 0.3000, 2.77229e+09, 2.77229e+09, 1.38614e+09
**
*Material, name=MAT_ANISO_05
*Elastic, type=ENGINEERING CONSTANTS
 6.65326e+09, 3.32663e+09, 3.32663e+09, 0.3000, 0.3000, 0.3000, 2.55894e+09, 2.55894e+09, 1.27947e+09
**
*Material, name=MAT_ANISO_06
*Elastic, type=ENGINEERING CONSTANTS
 6.12247e+09, 3.06123e+09, 3.06123e+09, 0.3000, 0.3000, 0.3000, 2.3548e+09, 2.3548e+09, 1.1774e+09
**
*Material, name=MAT_ANISO_07
*Elastic, type=ENGINEERING CONSTANTS
 5.6156e+09, 2.8078e+09, 2.8078e+09, 0.3000, 0.3000, 0.3000, 2.15984e+09, 2.15984e+09, 1.07992e+09
**
*Material, name=MAT_ANISO_08
*Elastic, type=ENGINEERING CONSTANTS
 5.13263e+09, 2.56632e+09, 2.56632e+09, 0.3000, 0.3000, 0.3000, 1.97409e+09, 1.97409e+09, 9.87045e+08
**
*Material, name=MAT_ANISO_09
*Elastic, type=ENGINEERING CONSTANTS
 4.67358e+09, 2.33679e+09, 2.33679e+09, 0.3000, 0.3000, 0.3000, 1.79753e+09, 1.79753e+09, 8.98766e+08
**
*Material, name=MAT_ANISO_10
*Elastic, type=ENGINEERING CONSTANTS
 4.23844e+09, 2.11922e+09, 2.11922e+09, 0.3000, 0.3000, 0.3000, 1.63017e+09, 1.63017e+09, 8.15085e+08
**
*Material, name=MAT_ANISO_11
*Elastic, type=ENGINEERING CONSTANTS
 3.82722e+09, 1.91361e+09, 1.91361e+09, 0.3000, 0.3000, 0.3000, 1.47201e+09, 1.47201e+09, 7.36003e+08
**
*Material, name=MAT_ANISO_12
*Elastic, type=ENGINEERING CONSTANTS
 3.4399e+09, 1.71995e+09, 1.71995e+09, 0.3000, 0.3000, 0.3000, 1.32304e+09, 1.32304e+09, 6.61519e+08
**
*Material, name=MAT_ANISO_13
*Elastic, type=ENGINEERING CONSTANTS
 3.0765e+09, 1.53825e+09, 1.53825e+09, 0.3000, 0.3000, 0.3000, 1.18327e+09, 1.18327e+09, 5.91634e+08
**
*Material, name=MAT_ANISO_14
*Elastic, type=ENGINEERING CONSTANTS
 2.737e+09, 1.3685e+09, 1.3685e+09, 0.3000, 0.3000, 0.3000, 1.05269e+09, 1.05269e+09, 5.26347e+08
**
*Material, name=MAT_ANISO_15
*Elastic, type=ENGINEERING CONSTANTS
 2.42142e+09, 1.21071e+09, 1.21071e+09, 0.3000, 0.3000, 0.3000, 9.31316e+08, 9.31316e+08, 4.65658e+08
**
*Material, name=MAT_ANISO_16
*Elastic, type=ENGINEERING CONSTANTS
 2.12975e+09, 1.06488e+09, 1.06488e+09, 0.3000, 0.3000, 0.3000, 8.19136e+08, 8.19136e+08, 4.09568e+08
**
*Material, name=MAT_ANISO_17
*Elastic, type=ENGINEERING CONSTANTS
 1.862e+09, 9.30998e+08, 9.30998e+08, 0.3000, 0.3000, 0.3000, 7.16153e+08, 7.16153e+08, 3.58076e+08
**
*Material, name=MAT_ANISO_18
*Elastic, type=ENGINEERING CONSTANTS
 1.61815e+09, 8.09076e+08, 8.09076e+08, 0.3000, 0.3000, 0.3000, 6.22366e+08, 6.22366e+08, 3.11183e+08
**
*Material, name=MAT_ANISO_19
*Elastic, type=ENGINEERING CONSTANTS
 1.39822e+09, 6.99109e+08, 6.99109e+08, 0.3000, 0.3000, 0.3000, 5.37776e+08, 5.37776e+08, 2.68888e+08
**
** =====  SECTIONS  =====
*Solid Section, elset=BIN_03, material=MAT_ANISO_03
,
**
*Solid Section, elset=BIN_04, material=MAT_ANISO_04
,
**
*Solid Section, elset=BIN_06, material=MAT_ANISO_06
,
**
*Solid Section, elset=BIN_07, material=MAT_ANISO_07
,
**
*Solid Section, elset=BIN_08, material=MAT_ANISO_08
,
**
*Solid Section, elset=BIN_10, material=MAT_ANISO_10
,
**
*Solid Section, elset=BIN_11, material=MAT_ANISO_11
,
**
** =====  BOUNDARY CONDITIONS  =====
** BC: inner face (tooth surface) fully fixed – adhesion to tooth
*Boundary
 INNER_FACE, ENCASTRE
**
** =====  STEP  =====
*Step, name=LOAD, nlgeom=NO
 Biofilm pressure loading (1e+06 Pa inward on outer face)
*Static
 0.1, 1.0, 1e-5, 1.0
**
** Concentrated forces: pressure=1e+06 Pa (=1 MPa), forces in N
*Cload
 14377, 1, 0.033614067
 14377, 2, 0.25281274
 14377, 3, -0.022627205
 14378, 1, -0.041345516
 14378, 2, 0.27317363
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 16173, 3, 0.26218551
**
*Output, field, variable=PRESELECT
*Output, history
*Node Output, nset=ALL_NODES
 U, RF
*Element Output, elset=ALL_ELEMS
 S, E, MISES
**
*End Step
