** biofilm_conformal_tet.py – Conformal C3D4 biofilm mesh
** STL   : P1_Tooth_23.stl
** DI CSV: p50_field.csv
** Thickness: 0.200 mm  Layers: 4  Total nodes: 8985  Total tets: 43080
** Inner face: tooth STL surface (zero penetration by construction)
**
*Heading
 Conformal biofilm tet mesh - P1_Tooth_23.stl
**
*Node
 1, -69.657928, -45.383583, 26.145887
 2, -69.328705, -45.38681, 25.758587
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**
*Element, type=C3D4
 1, 1, 2, 3, 1800
 2, 1, 2, 1800, 1799
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**
*Nset, nset=INNER_FACE
1, 2, 3, 4, 5, 6
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**
*Nset, nset=OUTER_FACE
7189, 7190, 7191, 7192, 7193, 7194
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**
*Nset, nset=BOT_NODES
114, 115, 116, 160, 306, 307
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**
*Nset, nset=TOP_NODES
111, 112, 113, 149, 150, 151
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**
*Nset, nset=ALL_NODES, generate
 1, 8985, 1
**
*Elset, elset=BIN_03
21541, 21542, 21543, 21544, 21545, 21546
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**
*Elset, elset=BIN_05
32311, 32312, 32313, 32314, 32315, 32316
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**
*Elset, elset=BIN_06
10771, 10772, 10773, 10774, 10775, 10776
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**
*Elset, elset=BIN_08
1, 2, 3, 4, 5, 6
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**
*Elset, elset=ALL_ELEMS, generate
 1, 43080, 1
**
** =====  MATERIALS (isotropic per DI bin, E in MPa = N/mm²)  =====
** *Expansion added for growth eigenstrain thermal analogy
** SPATIAL: T_node(x)=T_mean*DI(x)/DI_mean, T_mean=0.159092
*Material, name=MAT_ANISO_00
*Hyperelastic, Neo Hooke
 0.000183623, 2513.51
*Expansion, type=ISO, zero=0.0
 1.0
**
*Material, name=MAT_ANISO_01
*Hyperelastic, Neo Hooke
 0.000166862, 2765.99
*Expansion, type=ISO, zero=0.0
 1.0
**
*Material, name=MAT_ANISO_02
*Hyperelastic, Neo Hooke
 0.000150911, 3058.34
*Expansion, type=ISO, zero=0.0
 1.0
**
*Material, name=MAT_ANISO_03
*Hyperelastic, Neo Hooke
 0.000135772, 3399.36
*Expansion, type=ISO, zero=0.0
 1.0
**
*Material, name=MAT_ANISO_04
*Hyperelastic, Neo Hooke
 0.000121444, 3800.43
*Expansion, type=ISO, zero=0.0
 1.0
**
*Material, name=MAT_ANISO_05
*Hyperelastic, Neo Hooke
 0.000107926, 4276.43
*Expansion, type=ISO, zero=0.0
 1.0
**
*Material, name=MAT_ANISO_06
*Hyperelastic, Neo Hooke
 9.52195e-05, 4847.1
*Expansion, type=ISO, zero=0.0
 1.0
**
*Material, name=MAT_ANISO_07
*Hyperelastic, Neo Hooke
 8.33238e-05, 5539.1
*Expansion, type=ISO, zero=0.0
 1.0
**
*Material, name=MAT_ANISO_08
*Hyperelastic, Neo Hooke
 7.2239e-05, 6389.05
*Expansion, type=ISO, zero=0.0
 1.0
**
*Material, name=MAT_ANISO_09
*Hyperelastic, Neo Hooke
 6.19651e-05, 7448.36
*Expansion, type=ISO, zero=0.0
 1.0
**
*Material, name=MAT_ANISO_10
*Hyperelastic, Neo Hooke
 5.25021e-05, 8790.85
*Expansion, type=ISO, zero=0.0
 1.0
**
*Material, name=MAT_ANISO_11
*Hyperelastic, Neo Hooke
 4.38501e-05, 10525.4
*Expansion, type=ISO, zero=0.0
 1.0
**
*Material, name=MAT_ANISO_12
*Hyperelastic, Neo Hooke
 3.60089e-05, 12817.3
*Expansion, type=ISO, zero=0.0
 1.0
**
*Material, name=MAT_ANISO_13
*Hyperelastic, Neo Hooke
 2.89787e-05, 15926.8
*Expansion, type=ISO, zero=0.0
 1.0
**
*Material, name=MAT_ANISO_14
*Hyperelastic, Neo Hooke
 2.27594e-05, 20279
*Expansion, type=ISO, zero=0.0
 1.0
**
*Material, name=MAT_ANISO_15
*Hyperelastic, Neo Hooke
 1.7351e-05, 26600.1
*Expansion, type=ISO, zero=0.0
 1.0
**
*Material, name=MAT_ANISO_16
*Hyperelastic, Neo Hooke
 1.27535e-05, 36189
*Expansion, type=ISO, zero=0.0
 1.0
**
*Material, name=MAT_ANISO_17
*Hyperelastic, Neo Hooke
 8.96699e-06, 51470.8
*Expansion, type=ISO, zero=0.0
 1.0
**
*Material, name=MAT_ANISO_18
*Hyperelastic, Neo Hooke
 5.99135e-06, 77034.2
*Expansion, type=ISO, zero=0.0
 1.0
**
*Material, name=MAT_ANISO_19
*Hyperelastic, Neo Hooke
 3.82662e-06, 120613
*Expansion, type=ISO, zero=0.0
 1.0
**
** =====  SECTIONS  =====
*Solid Section, elset=BIN_03, material=MAT_ANISO_03
,
**
*Solid Section, elset=BIN_05, material=MAT_ANISO_05
,
**
*Solid Section, elset=BIN_06, material=MAT_ANISO_06
,
**
*Solid Section, elset=BIN_08, material=MAT_ANISO_08
,
**
** =====  BOUNDARY CONDITIONS  =====
** BC: inner face (tooth surface) fully fixed – adhesion to tooth
*Boundary
 INNER_FACE, ENCASTRE
**
** =====  STEP 1: GROWTH EIGENSTRAIN (thermal analogy)  =====
** alpha_final=0.4773  eps_growth=0.1591 per direction
** F_g = (1+alpha)I  →  T_growth = eps_growth = alpha/3
** alpha_T=1.0 → eps_thermal = T = eps_growth  (isotropic, stress-free)
** SPATIAL MODE: T_node(x) = T_mean*DI(x)/DI_mean
**   T_mean=0.1583  T_min=0.04444  T_max=0.3689
*Step, name=GROWTH, nlgeom=YES
 Growth-induced eigenstrain: constrained expansion by tooth adhesion
*Static
 1.0, 1.0, 1e-6, 1.0
**
** Per-node temperature (DI spatial field): 8985 nodes
*Temperature
 1, 0.12408558
 2, 0.14010651
 3, 0.11508216
 4, 0.12818834
 5, 0.17001711
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 8985, 0.14503187
**
*Output, field
*Node Output
 U, RF
*Element Output
 S, E, MISES
**
*End Step
**
** =====  STEP 2: LOAD  =====
*Step, name=LOAD, nlgeom=YES
 Biofilm pressure loading (100 Pa inward on outer face)
*Static
 0.01, 1.0, 1e-6, 0.1
**
** Concentrated forces: pressure=100 Pa (=0.0001 MPa), forces in N
*Cload
 7189, 1, 2.9161412e-06
 7189, 2, 2.1384359e-05
 7189, 3, -1.9306098e-06
 7190, 1, -3.6584885e-06
 7190, 2, 2.3875545e-05
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 8985, 3, 2.0146888e-05
**
*Output, field
*Node Output
 U, RF
*Element Output
 S, E, MISES
**
*End Step
