** biofilm_tooth_tie_assembly.py – Two-layer Tie model
** Tooth: T23 (S3 shell, E=18600 MPa, nu=0.31)
** Biofilm: C3D4 conformal (8 layers, t=0.500 mm)
** DI CSV: abaqus_field_dh_3d.csv
** Shell thickness: 0.500 mm
** Tooth: 1797 nodes, 3590 S3 | Biofilm: 16173 nodes, 86160 C3D4
** Interface: *Tie (biofilm INNER → tooth shell)
** Pressure: 1e+06 Pa (= 1 MPa) on biofilm outer
**
*Heading
 Two-layer biofilm+tooth: T23 (Tie constraint)
**
** ===== NODES =====
** Tooth nodes: 1 .. 1797
** Biofilm nodes: 1798 .. 17970
*Node
 1, -69.657928, -45.383583, 26.145887
 2, -69.328705, -45.38681, 25.758587
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**
** ===== ELEMENTS =====
*Element, type=S3
 1, 1, 2, 3
 2, 4, 5, 6
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**
*Element, type=C3D4
 3591, 1798, 1799, 1800, 3597
 3592, 1798, 1799, 3597, 3596
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**
** ===== NODE SETS =====
*Nset, nset=TOOTH_ALL
1, 2, 3, 4, 5, 6
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**
*Nset, nset=TOOTH_BASE
65, 66, 67, 83, 84, 85
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**
*Nset, nset=BIO_INNER
1798, 1799, 1800, 1801, 1802, 1803
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**
*Nset, nset=BIO_OUTER
16174, 16175, 16176, 16177, 16178, 16179
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**
*Nset, nset=BIO_ALL
1798, 1799, 1800, 1801, 1802, 1803
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**
** ===== ELEMENT SETS =====
*Elset, elset=TOOTH_ELEMS
1, 2, 3, 4, 5, 6
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**
*Elset, elset=BIO_BIN_03
68211, 68212, 68213, 68214, 68215, 68216
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**
*Elset, elset=BIO_BIN_04
14361, 14362, 14363, 14364, 14365, 14366
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**
*Elset, elset=BIO_BIN_06
35901, 35902, 35903, 35904, 35905, 35906
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**
*Elset, elset=BIO_BIN_07
46671, 46672, 46673, 46674, 46675, 46676
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**
*Elset, elset=BIO_BIN_08
25131, 25132, 25133, 25134, 25135, 25136
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**
*Elset, elset=BIO_BIN_10
78981, 78982, 78983, 78984, 78985, 78986
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**
*Elset, elset=BIO_BIN_11
3591, 3592, 3593, 3594, 3595, 3596
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**
*Elset, elset=BIO_ELEMS
3591, 3592, 3593, 3594, 3595, 3596
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**
** ===== MATERIALS =====
*Material, name=MAT_DENTIN
*Elastic
 18600.0, 0.3100
**
*Material, name=MAT_BIO_03
*Elastic
 7786.5623, 0.3000
**
*Material, name=MAT_BIO_04
*Elastic
 7207.9529, 0.3000
**
*Material, name=MAT_BIO_06
*Elastic
 6122.4693, 0.3000
**
*Material, name=MAT_BIO_07
*Elastic
 5615.5950, 0.3000
**
*Material, name=MAT_BIO_08
*Elastic
 5132.6325, 0.3000
**
*Material, name=MAT_BIO_10
*Elastic
 4238.4426, 0.3000
**
*Material, name=MAT_BIO_11
*Elastic
 3827.2152, 0.3000
**
** ===== SECTIONS =====
*Shell Section, elset=TOOTH_ELEMS, material=MAT_DENTIN
 0.5000, 5
**
*Solid Section, elset=BIO_BIN_03, material=MAT_BIO_03
,
**
*Solid Section, elset=BIO_BIN_04, material=MAT_BIO_04
,
**
*Solid Section, elset=BIO_BIN_06, material=MAT_BIO_06
,
**
*Solid Section, elset=BIO_BIN_07, material=MAT_BIO_07
,
**
*Solid Section, elset=BIO_BIN_08, material=MAT_BIO_08
,
**
*Solid Section, elset=BIO_BIN_10, material=MAT_BIO_10
,
**
*Solid Section, elset=BIO_BIN_11, material=MAT_BIO_11
,
**
** ===== TIE CONSTRAINT (biofilm INNER → tooth shell) =====
** Biofilm inner nodes are at the same positions as tooth shell nodes.
** position tolerance should cover the near-zero gap between them.
*Surface, type=ELEMENT, name=TOOTH_SURF
 TOOTH_ELEMS, SPOS
**
*Surface, type=NODE, name=BIO_INNER_SURF
 BIO_INNER
**
*Tie, name=TOOTH_BIO_TIE, position tolerance=0.1, adjust=YES
 BIO_INNER_SURF, TOOTH_SURF
**
** ===== BOUNDARY CONDITIONS =====
** Tooth base (cervical region) fixed
*Boundary
 TOOTH_BASE, ENCASTRE
**
** ===== STEP =====
*Step, name=LOAD, nlgeom=NO
 Inward pressure 1 MPa on biofilm outer face
*Static
 0.1, 1.0, 1e-5, 1.0
**
** Pressure = 1e+06 Pa (= 1 MPa)
*Cload
 16174, 1, 0.033614067
 16174, 2, 0.25281274
 16174, 3, -0.022627205
 16175, 1, -0.041345516
 16175, 2, 0.27317363
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 17970, 3, 0.26218551
**
*Output, field
*Node Output
 U, RF
*Element Output
 S, E, MISES
**
*End Step
